# OpenSim document version 30000
Model arm:
  length_units: meters
  force_units: N
  gravity: 0 0 0
  BodySet:
    Body ground: mass=0 mass_center=(0 0 0) inertia_xx=0 inertia_yy=0 inertia_zz=0
        meshes=(checkered_floor.vtp block.vtp)
    Body block: mass=20 mass_center=(0 0 0) inertia_xx=0.1333333 inertia_yy=0.1333333 inertia_zz=0.1333333
        meshes=block.vtp
      PinJoint wall_block: parent_body=ground location_in_parent=(0 0.25 0) orientation_in_parent=(0 -1.570796 0)
          location=(0 0 0) orientation=(0 -1.570796 0)
        Coordinate arm_rotate: motion_type=rotational default_value=0 range=(-1.57 1.57) clamped=true
  ForceSet:
    Thelen2003Muscle muscle1: min_control=0 max_control=1 optimal_force=1 max_isometric_force=800
        optimal_fiber_length=0.2 tendon_slack_length=0.3 pennation_angle_at_optimal=0 [radians] default_activation=0.05
        default_fiber_length=0.1
      PathPoint point1: ground (0 0.7 -0.05)
      PathPoint point2: block (0 0.025 -0.1)
    Thelen2003Muscle muscle2: min_control=0 max_control=1 optimal_force=1 max_isometric_force=1000
        optimal_fiber_length=0.3 tendon_slack_length=0.4 pennation_angle_at_optimal=0.1 default_activation=0.05
        default_fiber_length=0.1
      PathPoint point1: ground (0 0.7 0.05)
      PathPoint point2: ground (0 0.45 0.05)
      PathPoint point3: ground (0 0.2 0.025)
      PathPoint point4: block (0 -0.025 -0.1)
