# OpenSim document version 30000
Model TOW1D:
  length_units: meters
  force_units: N
  gravity: 0 0 0
  credits:
    This TugOfWar model was modified by Brian Umberger to have a single DOF slider joint, rather than a 6 DOF free joint with 5 constraints. It was modifed from the TugOfWar model that is provided with OpenSim that is due to Frank Anderson, Peter Loan, Ayman Habib, Ajay Seth and Michael Sherman
  BodySet:
    Body ground: mass=0 mass_center=(0 0 0) inertia_xx=1 inertia_yy=1 inertia_zz=1
        meshes=(ground.vtp anchor1.vtp anchor2.vtp)
    Body Block: mass=20 mass_center=(0 0 0) inertia_xx=1 inertia_yy=1 inertia_zz=1 meshes=block.vtp
      SliderJoint blockToGround: parent_body=ground location_in_parent=(0 0.05 0) orientation_in_parent=(0 1.570796 0)
          location=(0 0 0)
        Coordinate blockToGround_coord_0: motion_type=translational range=(-1 1) prescribed=true
  ForceSet:
    Thelen2003Muscle muscle1: min_control=0 max_control=1 max_isometric_force=1000 optimal_fiber_length=0.25
        tendon_slack_length=0.05 pennation_angle_at_optimal=0 [radians] activation_time_constant=0.055
        deactivation_time_constant=0.065
      PathPoint point1: ground (0 0.05 -0.35)
      PathPoint point2: Block (0.05 0 0)
    Thelen2003Muscle muscle2: min_control=0 max_control=1 max_isometric_force=1000 optimal_fiber_length=0.25
        tendon_slack_length=0.05 pennation_angle_at_optimal=0 activation_time_constant=0.055
        deactivation_time_constant=0.065
      PathPoint point1: ground (0 0.05 0.35)
      PathPoint point2: Block (-0.05 0 0)
